# OpenSim document version 40000
Model arm_articulated_hand_kin_model:
  gravity: 0 -9.80665 0
  publications: Gritsenko et al. PLOS ONE 2016
  length_units: meters
  force_units: N
  credits:
    Matthew Boots, Russell Hardesty, Anton Sobinov, Valeriya Gritsenko, Sergiy Yakovenko, Katherine R. Saul, Wendy M. Murray, Craig M. Goehler, Melissa Daly, Meghan E. Vidt, Dustin L. Crouch
  # Matthew G Yough et al. Int IEEE EMBS Conf Neural Eng. 2021 May.
  Ground
  BodySet:
    Body Thorax: mass=38.298 [kg] mass_center=(-0.0616 -0.254 0) inertia=(0.6915 1.0121 1.3266 0 0 0) meshes=thorax.vtp
      WrapEllipsoid Thorax: xyz_body_rotation=(0.0434587 -0.331962 0.189892) translation=(-0.0386 -0.1273 0.0709)
          quadrant=all dimensions=(0.1 0.135 0.08)
      WrapEllipsoid PECM_R_Thorax: xyz_body_rotation=(0.0434587 -0.331962 0.189892)
          translation=(-0.0386 -0.1273 0.0709) quadrant=all dimensions=(0.1 0.135 0.08)
    Body RClavicle: mass=0.156 mass_center=(-0.011096 0.0063723 0.054168)
        inertia=(0.00024259 0.00025526 4.442e-5 -1.898e-5 -6.994e-5 5.371e-5) meshes=clavicle.vtp
    Body RClavicle_Phantom: mass=0.0001 mass_center=(0 0 0) inertia=(1 1 1 0 0 0)
    Body RScapula: mass=0.70396 mass_center=(-0.054694 -0.035032 -0.043734)
        inertia=(0.0012429 0.0011504 0.0013651 0.0004494 0.00040922 0.0002411) meshes=scapula.vtp
      WrapTorus SUPSP2: xyz_body_rotation=(0.3 0.4 -0.1) translation=(-0.01 -0.01 -0.01) quadrant=all
          inner_radius=0.007 outer_radius=0.01
      WrapEllipsoid Deltoid2: xyz_body_rotation=(3.13042 -1.54881 -1.31423) translation=(-0.0058 -0.0378 0.0096)
          quadrant=-y dimensions=(0.033 0.04 0.035)
      WrapTorus Delt3: xyz_body_rotation=(0.620988 0.32882 -0.560774) translation=(-0.0973 -0.0428 -0.037) quadrant=all
          inner_radius=0.04 outer_radius=0.06
      WrapTorus INFSP: xyz_body_rotation=(0.0253073 0.58835 0.151844) translation=(-0.0561 -0.0199 -0.0112)
          quadrant=all inner_radius=0.008 outer_radius=0.019
      WrapEllipsoid TMIN: xyz_body_rotation=(-2.09754 -0.280823 -1.76348) translation=(-0.0418 -0.0519 -0.0359)
          quadrant=x dimensions=(0.03 0.03 0.05)
      WrapCylinder TRIlongglen: xyz_body_rotation=(1.37532 -0.294612 2.43596) translation=(-0.0359 -0.0309 -0.0132)
          quadrant=x radius=0.003 length=0.03
    Body RScapula_Phantom: mass=0.0001 mass_center=(0 0 0) inertia=(1 1 1 0 0 0)
    Body Phys_Phantom: mass=0.0001 mass_center=(0 0 0) inertia=(0 0 0 0 0 0)
    Body RA1H_Phantom: mass=0.0001 mass_center=(0 0 0) inertia=(1 1 1 0 0 0)
    Body RA1H_Phantom2: mass=0.0001 mass_center=(0 0 0) inertia=(1 1 1 0 0 0)
    Body RA1H: mass=2.0832 mass_center=(0.0174 -0.1353 -0.0123) inertia=(0.0182 0.0024 0.0182 0 0 0) meshes=humerus.vtp
      WrapTorus Deltoid2: xyz_body_rotation=(0.7742 0.022 -1.31423) translation=(-0.0058 0.02 0.03) quadrant=x
          inner_radius=0.03 outer_radius=0.04
      WrapEllipsoid DELT1hh: xyz_body_rotation=(0.0584685 1.00461 0.570374) translation=(-0.0139 -0.0127 -0.0262)
          quadrant=z dimensions=(0.03 0.1 0.05)
      WrapCylinder delt2hum: xyz_body_rotation=(1.55093 -0.0199582 0.0596618) translation=(0.0017 -0.0958 0.0011)
          quadrant=all radius=0.0109 length=0.12
      WrapEllipsoid delt3hum: xyz_body_rotation=(1.72735 0.0759218 -2.74313) translation=(0.0019 -0.0592 0.0011)
          quadrant=x dimensions=(0.01 0.01 0.05)
      WrapEllipsoid SUPSP: xyz_body_rotation=(0.0380482 0.00855211 -1.30673) translation=(0.0002 0.0077 0.0043)
          quadrant=all dimensions=(0.02 0.02 0.02)
      WrapEllipsoid INFSP_and_TMIN_hum_head: xyz_body_rotation=(-0.286583 -0.00907571 -0.0684169)
          translation=(-0.0003 0.0026 0.0038) quadrant=all dimensions=(0.02 0.025 0.02)
      WrapEllipsoid SUBSCAP: xyz_body_rotation=(-0.924501 0.288852 0.381529) translation=(-0.0025 0.0007 -0.0045)
          quadrant=all dimensions=(0.02 0.017 0.028)
      WrapCylinder TMINhum: xyz_body_rotation=(1.75353 0.0692896 2.74628) translation=(-0.0014 -0.0455 0) quadrant=x
          radius=0.007 length=0.07
      WrapCylinder TMAJ_LAThum: xyz_body_rotation=(1.53641 -0.0637045 1.41424) translation=(0.0007 -0.0443 -0.0055)
          quadrant=-x radius=0.007 length=0.04
      WrapCylinder PEC12hum: xyz_body_rotation=(1.55928 -0.0774926 -0.925897) translation=(0.002 -0.0508 -0.0017)
          quadrant=x radius=0.009 length=0.07
      WrapSphere PEC23hh: translation=(-0.0086 0.0021 -0.0004) quadrant=all radius=0.02
      WrapCylinder PEC3hum: xyz_body_rotation=(1.44094 -0.0561996 1.75196) translation=(0.0009 -0.0551 -0.0004)
          quadrant=-x radius=0.008 length=0.1
      WrapCylinder LAT_TMAJhh: xyz_body_rotation=(-0.305084 -0.018326 -0.686613) translation=(-0.0224 0.0102 0.0094)
          quadrant=-y radius=0.007 length=0.045
      WrapEllipsoid LAT_TMAJ2hh: xyz_body_rotation=(-0.127235 1.8469 0.0197222) translation=(0.0016 0.0092 -0.0052)
          quadrant=x dimensions=(0.01 0.02 0.02)
      WrapEllipsoid TRIlonghh: xyz_body_rotation=(3.00162 -0.853466 2.57419) translation=(-0.0078 -0.0041 -0.0014)
          quadrant=z dimensions=(0.035 0.02 0.02)
      WrapCylinder TRI: xyz_body_rotation=(-0.14015 -0.00628319 0.154985) translation=(0.0028 -0.2919 -0.0119)
          quadrant=all radius=0.016 length=0.1
      WrapSphere TMAJ_LAT_PEC_CORBhh: translation=(0.0007 0 0.006) quadrant=all radius=0.03
      WrapSphere DELT_TMAJ_LAT_PEC_CORBhh: translation=(0.0007 0 0.006) quadrant=all radius=0.03
      WrapCylinder CORBhum: xyz_body_rotation=(-1.60832 0.0959931 0.875283) translation=(0.0027 -0.1202 -0.0059)
          quadrant=x radius=0.008 length=0.1
      WrapEllipsoid Elbow_PT_ECRL_1: xyz_body_rotation=(-0.162 -0.11083 0.61453) translation=(0.003 -0.2872 -0.0069)
          quadrant=x dimensions=(0.018 0.025 0.035)
      WrapCylinder TRI_2: xyz_body_rotation=(-0.14015 -0.00628319 0.154985) translation=(0.002 -0.279 -0.0119)
          quadrant=all radius=0.024 length=0.1
      WrapCylinder BIC_LO_elbow: xyz_body_rotation=(-0.14015 -0.0062832 0.15499) translation=(0.004 -0.2731 -0.0119)
          quadrant=x radius=0.035 length=0.11
      WrapCylinder BIC_LO_3: xyz_body_rotation=(-0.19252 -0.0062832 1.5708) translation=(0.0255 -0.223 -0.033)
          quadrant=-x radius=0.005 length=0.11
      WrapEllipsoid BIC_LO_2: xyz_body_rotation=(-2.0043 -1.0016 0.97547) translation=(0.0033 0.0073 0.0003)
          quadrant=-y dimensions=(0.025 0.02 0.02)
      WrapCylinder BIC_SH_elbow: xyz_body_rotation=(-0.14015 -0.0062832 0.15499) translation=(0.004 -0.2731 -0.0119)
          quadrant=x radius=0.035 length=0.11
      WrapEllipsoid ANC_1: xyz_body_rotation=(0.00750492 -0.196699 1.04929) translation=(0.0024 -0.285 0.002)
          quadrant=-x dimensions=(0.014 0.014 0.014)
      WrapCylinder PECM_R_hum: xyz_body_rotation=(1.55928 -0.0774926 -0.925897) translation=(0.002 -0.0508 -0.0017)
          quadrant=x radius=0.009 length=0.07
      WrapEllipsoid PECM_R_hh: xyz_body_rotation=(-0.620465 -0.310494 0.363727) translation=(-0.0037 0.0005 -0.0025)
          quadrant=-z dimensions=(0.03 0.02 0.02)
      WrapEllipsoid Elbow_PT: xyz_body_rotation=(-0.162 -0.093377 0.61453) translation=(0.003 -0.2772 -0.0076)
          quadrant=x dimensions=(0.02 0.032 0.032)
      WrapCylinder ElbowECRLFlex: xyz_body_rotation=(0 0.15 0) translation=(0.015 -0.25 0) quadrant=-y radius=0.012
          length=0.08
    Body RA2U: mass=0.9827 mass_center=(0.0086 -0.0853 0.0216)
        inertia=(0.0048 0.001 0.0044 0.00028171 -6.7703e-5 0.0009706) meshes=ulna.vtp
      WrapCylinder EPL_prosup2: xyz_body_rotation=(-1.7 -0.1 0) translation=(-0.009 -0.11 0.02) quadrant=-y radius=0.01
          length=0.1
      WrapCylinder PQ2_1: xyz_body_rotation=(1.39138 0.0689405 1.52245) translation=(-0.0012 -0.2092 0.0428)
          quadrant=all radius=0.008 length=0.1
      WrapEllipsoid ANC_2: xyz_body_rotation=(0.00750492 -0.196699 1.04929) translation=(-0.016 0.002 0.002)
          quadrant=all dimensions=(0.012 0.012 0.012)
    Body RA2R: mass=0.2077 mass_center=(0.0299 -0.1614 0.0139)
        inertia=(0.00038999 7.8781e-5 0.000358 2.6803e-5 -3.7705e-6 5.7073e-5) meshes=radius.vtp
      WrapCylinder WristFCUSup: xyz_body_rotation=(-0.1 1.05 0) translation=(-0.016 -0.104 0.0014) quadrant=x
          radius=0.01 length=0.02
      WrapCylinder PQ1: xyz_body_rotation=(-1.60762 -0.0127409 -2.69025) translation=(0.0281 -0.1986 0.0288)
          quadrant=all radius=0.01 length=0.1
      WrapCylinder WristFCRFlex: xyz_body_rotation=(0.593936 1.50011 -2.23559) translation=(0.033 -0.228 0.008)
          quadrant=-y radius=0.004 length=0.02
      WrapCylinder WristFCUFlex: xyz_body_rotation=(0.593936 1.50011 -2.23559) translation=(0.015 -0.231 0.01)
          quadrant=-y radius=0.004 length=0.02
      WrapCylinder WristExtFingers: xyz_body_rotation=(0.593936 1.6 -2.23559) translation=(0.01 -0.232 0.045)
          quadrant=y radius=0.007 length=0.08
      WrapCylinder WristFlexFingers: xyz_body_rotation=(0.59394 1.5001 -1.7) translation=(0.01 -0.24 0.025) quadrant=-y
          radius=0.016 length=0.08
      WrapCylinder WristEIPFlex: xyz_body_rotation=(0.593936 1.50011 -1.7) translation=(0.01 -0.24 0.024) quadrant=-y
          radius=0.015 length=0.08
      WrapTorus EPL_Wrist: xyz_body_rotation=(1.3 0 0) translation=(0.035 -0.24 0.035) quadrant=all inner_radius=0.007
          outer_radius=0.008
      WrapCylinder wristSUPsup: xyz_body_rotation=(1.57 0 -2) translation=(-0.001 -0.03 0.005) quadrant=-y radius=0.01
          length=0.04
      WrapCylinder WristECUSup: xyz_body_rotation=(0 -2.2 0) translation=(0 -0.04 0.0075) quadrant=x radius=0.015
          length=0.05
      WrapCylinder WristECRLPro: xyz_body_rotation=(1.5 0.25 0) translation=(0.01 -0.08 0.008) quadrant=x radius=0.012
          length=0.05
      WrapTorus ECRB_1: xyz_body_rotation=(1.57 0 0) translation=(0.02 -0.237 0.044) quadrant=all inner_radius=0.005
          outer_radius=0.007
      WrapCylinder WristFCRSup: translation=(0.009 -0.07 0) quadrant=x radius=0.01 length=0.04
      WrapCylinder WristFCUPro: xyz_body_rotation=(-0.1 1.8 0) translation=(0.02 -0.1 0.01) quadrant=x radius=0.01
          length=0.03
      WrapCylinder WristPLSup: translation=(-0.005 -0.1 0) quadrant=x radius=0.018 length=0.04
      WrapCylinder BIC_LO_pro_sup: xyz_body_rotation=(1.3833 0.15001 0) translation=(0.0075 -0.06 0.003) quadrant=-y
          radius=0.0055 length=0.09
      WrapCylinder BIC_SH__pro_sup: xyz_body_rotation=(1.3833 0.15001 0) translation=(0.0075 -0.06 0.003) quadrant=-y
          radius=0.0055 length=0.09
      WrapCylinder Sup_Pro_PT: xyz_body_rotation=(1.45 0.25 0) translation=(0.02 -0.1 0.01) quadrant=x radius=0.009
          length=0.09
    Body RA3M: mass=0.2455 mass_center=(0 -0.045 0) inertia=(0.0001814 0.00013045 0.0002778 0 0 0)
        meshes=(sdfast_1seg_hand_fr_c_5mc.vtp sdfast_1seg_hand_fr_c_4mc.vtp sdfast_1seg_hand_fr_c_3mc.vtp sdfast_1seg_hand_fr_c_2mc.vtp sdfast_1seg_hand_fr_c_trapezium.vtp sdfast_1seg_hand_fr_c_trapezoid.vtp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)
      WrapCylinder WristAPLExt: xyz_body_rotation=(0.593936 1.6 -2.23559) translation=(0.026 0 0) quadrant=y
          radius=0.0055 length=0.01
      WrapCylinder WristAPLExt2: xyz_body_rotation=(0.593936 1.6 -2.23559) translation=(0.026 0 -0.012) quadrant=-y
          radius=0.0055 length=0.01
      WrapCylinder WristEPBExt: xyz_body_rotation=(0.593936 1.6 -2.23559) translation=(0.026 0.001 0.001) quadrant=y
          radius=0.004 length=0.01
      WrapCylinder WristEPBFlex: xyz_body_rotation=(0.593936 1.6 -2.23559) translation=(0.026 -0.0029 -0.007)
          quadrant=-y radius=0.004 length=0.01
      WrapCylinder WristFCUExt: xyz_body_rotation=(0.593936 1.50011 -2.23559) translation=(-0.01 -0.001 0) quadrant=y
          radius=0.014 length=0.02
      WrapCylinder WristFDSExt: xyz_body_rotation=(0.59394 1.5001 -2.2356) translation=(0 -0.001 0) quadrant=y
          radius=0.012 length=0.05
      WrapCylinder WristFCRExt: xyz_body_rotation=(0.593936 1.50011 -2.23559) translation=(0.015 -0.003 0) quadrant=y
          radius=0.0135 length=0.02
      WrapTorus Thumb_APB: xyz_body_rotation=(0.785 1.57 0) translation=(0.015 -0.019 -0.027) quadrant=all
          inner_radius=0.004 outer_radius=0.005
      WrapTorus Thumb_EPB: xyz_body_rotation=(1.5 0.3 0) translation=(0.04 -0.021 -0.015) quadrant=all
          inner_radius=0.004 outer_radius=0.005
      WrapTorus Thumb_APL: xyz_body_rotation=(-0.7 0 0) translation=(0.033 -0.018 -0.018) quadrant=all
          inner_radius=0.004 outer_radius=0.005
      WrapTorus Thumb_A_A_ADPT: xyz_body_rotation=(0 1.57 0) translation=(0.014 -0.048 -0.01) quadrant=all
          inner_radius=0.002 outer_radius=0.003
      WrapCylinder Prox2FlexFDS: xyz_body_rotation=(0.593936 1.50011 -2.23559) translation=(0.021 -0.083 0) quadrant=y
          radius=0.009 length=0.01
      WrapCylinder Prox3FlexFDS: xyz_body_rotation=(0.593936 1.50011 -2.23559) translation=(0.004 -0.083 0) quadrant=y
          radius=0.013 length=0.01
      WrapCylinder Prox4FlexFDS: xyz_body_rotation=(0.593936 1.50011 -2.23559) translation=(-0.011 -0.079 0) quadrant=y
          radius=0.0115 length=0.01
      WrapCylinder Prox5FlexFDS: xyz_body_rotation=(0.593936 1.50011 -2.23559) translation=(-0.022 -0.072 0) quadrant=y
          radius=0.01 length=0.012
      WrapCylinder ProxEDMExt2: xyz_body_rotation=(0.593936 1.50011 -2.23559) translation=(-0.022 -0.075 0) quadrant=-y
          radius=0.005 length=0.012
      WrapTorus ECRL_Wrist_1: xyz_body_rotation=(1.5708 0 0) translation=(0.014 -0.013 0.012) quadrant=all
          inner_radius=0.002 outer_radius=0.003
      WrapCylinder WristPLExt: xyz_body_rotation=(0.593936 1.50011 -2.23559) translation=(0 -0.004 0) quadrant=y
          radius=0.02 length=0.02
      WrapCylinder WristECUExt: xyz_body_rotation=(1.0472 1.5001 -2) translation=(-0.015 -0.004 0.006) quadrant=y
          radius=0.001 length=0.02
      WrapCylinder WristECUFlex: xyz_body_rotation=(0.59394 1.5001 -2) translation=(-0.015 -0.005 0) quadrant=-y
          radius=0.005 length=0.02
      WrapCylinder WristFDP2Ext: xyz_body_rotation=(0.59394 1.5001 -2.2356) translation=(0 -0.001 0) quadrant=y
          radius=0.015 length=0.05
      WrapCylinder Prox2FlexFDP: xyz_body_rotation=(0.59394 1.5001 -2.2356) translation=(0.021 -0.083 0) quadrant=y
          radius=0.008 length=0.01
      WrapCylinder Prox3FlexFDP: xyz_body_rotation=(0.59394 1.5001 -2.2356) translation=(0.004 -0.085 0) quadrant=y
          radius=0.0095 length=0.01
      WrapCylinder Prox4FlexFDP: xyz_body_rotation=(0.593936 1.50011 -2.23559) translation=(-0.011 -0.081 0) quadrant=y
          radius=0.0095 length=0.01
      WrapCylinder Prox5FlexFDP: xyz_body_rotation=(0.59394 1.5001 -2.2356) translation=(-0.022 -0.075 0) quadrant=y
          radius=0.0085 length=0.012
    Body RA4P1: mass=0.0198 mass_center=(0 -0.0277 0) inertia=(5.5409e-6 9.0978e-7 5.5409e-6 0 0 0) meshes=1mc.vtp
      WrapTorus Thumb_OP: xyz_body_rotation=(1.57376 0 2) translation=(-0.005 0 -0.005) quadrant=all inner_radius=0.004
          outer_radius=0.005
      WrapCylinder ThumbFlexCylinder: xyz_body_rotation=(0 -0.6 0) translation=(0 0 0) quadrant=-x radius=0.016
          length=0.03
      WrapTorus ThumbFlexTorus: xyz_body_rotation=(-1.57376 -0.0797616 0.39235) translation=(-0.01 0 -0.02)
          quadrant=all inner_radius=0.002 outer_radius=0.008
      WrapTorus Thumb_EPL: xyz_body_rotation=(-1.57376 -0.0797616 0.39235) translation=(0.01 0 0.007) quadrant=all
          inner_radius=0.004 outer_radius=0.005
      WrapCylinder CentralFlex1: translation=(0 -0.04 0) quadrant=-x radius=0.007 length=0.015
    Body RA5C1: mass=0.0179 mass_center=(0 -0.0183 0) inertia=(2.3722e-6 7.6225e-7 2.3722e-6 0 0 0)
        meshes=thumbprox.vtp
      WrapCylinder CenFPBFlex: xyz_body_rotation=(0 0 0.4) translation=(-0.003 0.002 0) quadrant=-x radius=0.0035
          length=0.015
      WrapCylinder CenFPLFlex: xyz_body_rotation=(0 0 0.4) translation=(0.002 0.004 0) quadrant=-x radius=0.011
          length=0.015
      WrapCylinder CenExtEPB: xyz_body_rotation=(0 0 0.2) translation=(0 0.001 0) quadrant=x radius=0.0085 length=0.015
      WrapCylinder CenExtEPL: xyz_body_rotation=(0 0 0.2) translation=(0 0.002 0) quadrant=x radius=0.0085 length=0.015
    Body RA6D1: mass=0.0139 mass_center=(0 -0.013 0) inertia=(1.0449e-6 5.2996e-7 1.0449e-6 0 0 0) meshes=thumbdist.vtp
      WrapCylinder DistalFlex1: translation=(-0.002 0.001 0) quadrant=-x radius=0.006 length=0.01
      WrapCylinder DistalExt1: translation=(0.002 0.001 0) quadrant=x radius=0.002 length=0.01
    Body RA4P2: mass=0.0163 mass_center=(0 -0.0169 0) inertia=(1.9255e-6 7.4593e-7 1.9255e-6 0 0 0) meshes=2proxph.vtp
      WrapCylinder ProxEDC2Ext: xyz_body_rotation=(0.59394 1.5001 -2.2356) translation=(0 0.001 0.0065) quadrant=-y
          radius=0.0025 length=0.012
      WrapCylinder CentralExt2: xyz_body_rotation=(-1.57 1.57 1) translation=(0 -0.041 0) quadrant=-y radius=0.004
          length=0.012
      WrapCylinder Cen2FlexFDS: xyz_body_rotation=(-1.57 1.57 0.25) translation=(0 -0.041 -0.0015) quadrant=y
          radius=0.004 length=0.01
      WrapCylinder Cen2FlexFDP: xyz_body_rotation=(-1.57 1.57 0.8) translation=(0 -0.04 -0.0045) quadrant=y
          radius=0.003 length=0.01
    Body RA5C2: mass=0.0139 mass_center=(0 -0.0122 0) inertia=(9.9e-7 5.9287e-7 9.9e-7 0 0 0) meshes=2midph.vtp
      WrapCylinder DistalExt2: xyz_body_rotation=(-1.57 1.57 0) translation=(0 -0.022 0) quadrant=-y radius=0.0009
          length=0.01
    Body RA6D2: mass=0.0131 mass_center=(0 -0.0068 0) inertia=(4.5404e-7 4.9967e-7 4.5404e-7 0 0 0) meshes=2distph.vtp
    Body RA4P3: mass=0.0202 mass_center=(0 -0.0176 0) inertia=(2.5527e-6 9.2786e-7 2.5527e-6 0 0 0) meshes=3proxph.vtp
      WrapCylinder ProxEDC3Ext: xyz_body_rotation=(0.59394 1.5001 -2.2356) translation=(0 0.005 0.004) quadrant=-y
          radius=0.0025 length=0.012
      WrapCylinder Cen3FlexFDS: xyz_body_rotation=(-1.57 1.57 0.25) translation=(0 -0.0415 -0.0015) quadrant=y
          radius=0.005 length=0.01
      WrapCylinder Cen3FlexFDP: xyz_body_rotation=(-1.57 1.57 0.8) translation=(0 -0.04 -0.0035) quadrant=y
          radius=0.004 length=0.01
    Body RA5C3: mass=0.0159 mass_center=(0 -0.0127 0) inertia=(1.1961e-6 6.7755e-7 1.961e-6 0 0 0) meshes=3midph.vtp
      WrapCylinder DistalExt3: xyz_body_rotation=(-1.57 1.57 0) translation=(0 -0.029 0) quadrant=-y radius=0.0007
          length=0.01
    Body RA6D3: mass=0.0119 mass_center=(0 -0.0071 0) inertia=(4.2792e-7 4.5424e-7 4.2792e-7 0 0 0) meshes=3distph.vtp
    Body RA4P4: mass=0.0143 mass_center=(0 -0.0165 0) inertia=(1.6303e-6 6.5496e-7 1.6303e-6 0 0 0) meshes=4proxph.vtp
      WrapCylinder ProxEDC4Ext: xyz_body_rotation=(0.593936 1.50011 -2.23559) translation=(0 0.0025 0.003) quadrant=-y
          radius=0.002 length=0.012
      WrapCylinder Cen4FlexFDS: xyz_body_rotation=(-1.57 1.57 0.8) translation=(0 -0.04 -0.002) quadrant=y
          radius=0.0035 length=0.01
      WrapCylinder Cen4FlexFDP: xyz_body_rotation=(-1.57 1.57 1.2) translation=(0 -0.038 -0.003) quadrant=y
          radius=0.003 length=0.01
    Body RA5C4: mass=0.0108 mass_center=(0 -0.012 0) inertia=(7.4684e-7 4.6157e-7 7.4684e-7 0 0 0) meshes=4midph.vtp
      WrapCylinder DistalExt4: xyz_body_rotation=(-1.57 1.57 0) translation=(0 -0.024 0) quadrant=-y radius=0.0007
          length=0.01
    Body RA6D4: mass=0.0093 mass_center=(0 -0.0067 0) inertia=(3.1688e-7 3.5581e-7 3.1688e-7 0 0 0) meshes=4distph.vtp
    Body RA4P5: mass=0.0121 mass_center=(0 -0.0143 0) inertia=(1.097e-6 5.5491e-7 1.097e-6 0 0 0) meshes=5proxph.vtp
      WrapCylinder ProxEDC5Ext: xyz_body_rotation=(0.59394 1.5001 -2.2356) translation=(0 0.002 0.003) quadrant=-y
          radius=0.002 length=0.012
      WrapCylinder ProxEDMExt: xyz_body_rotation=(0.593936 1.50011 -2.23559) translation=(0 0.002 0.003) quadrant=-y
          radius=0.002 length=0.012
      WrapCylinder Cen5ExtEDM: xyz_body_rotation=(-1.57 1.57 0) translation=(0 -0.032 0.0005) quadrant=-y radius=0.0026
          length=0.01
      WrapCylinder Cen5FlexFDS: xyz_body_rotation=(-1.57 1.57 0) translation=(0 -0.033 -0.001) quadrant=y radius=0.003
          length=0.01
      WrapCylinder Cen5FlexFDP: xyz_body_rotation=(-1.57 1.57 1) translation=(0 -0.031 -0.003) quadrant=y radius=0.002
          length=0.01
    Body RA5C5: mass=0.0073 mass_center=(0 -0.0103 0) inertia=(4.1684e-7 3.1337e-7 4.1684e-7 0 0 0) meshes=5midph.vtp
      WrapCylinder DistalExt5: xyz_body_rotation=(-1.57 1.57 0) translation=(0 -0.019 0) quadrant=-y radius=0.0015
          length=0.01
    Body RA6D5: mass=0.0067 mass_center=(0 -0.0058 0) inertia=(2.0336e-7 2.5741e-7 2.0336e-7 0 0 0) meshes=5distph.vtp
      WrapCylinder Dist5FlexFDP_1: xyz_body_rotation=(-1.57 1.57 0) translation=(0 0 0.003) quadrant=y radius=0.001
          length=0.01
      WrapCylinder Dist5FlexFDP_2: xyz_body_rotation=(-2.0944 1.57 0) translation=(0 -0.003 -0.0045) quadrant=-y
          radius=0.001 length=0.01
  JointSet:
    CustomJoint ground_thorax: socket_parent_frame=ground_offset socket_child_frame=Thorax_offset
      Coordinate thorax_rot1: default_value=0 range=(-1.5708 1.5708) clamped=false locked=true
      Coordinate thorax_rot2: default_value=0 range=(-1.5708 1.5708) clamped=false locked=true
      Coordinate thorax_rot3: default_value=0 range=(-1.5708 1.5708) clamped=false locked=true
      PhysicalOffsetFrame ground_offset: socket_parent=/ground translation=(0 0 0) [meters]
      PhysicalOffsetFrame Thorax_offset: socket_parent=/bodyset/Thorax translation=(0 -0.508 0)
      SpatialTransform: axes_held_at_zero=(translation1 translation2 translation3)
        TransformAxis rotation1: coordinates=thorax_rot1 axis=(0 0 1) LinearFunction(coefficients=1 0)
        TransformAxis rotation2: coordinates=thorax_rot2 axis=(0 1 0) LinearFunction(coefficients=1 0)
        TransformAxis rotation3: coordinates=thorax_rot3 axis=(1 0 0) LinearFunction(coefficients=1 0)
    CustomJoint sternoclavicular: socket_parent_frame=Thorax_offset socket_child_frame=RClavicle_offset
      Coordinate sternoclavicular_r2: default_value=-0.1267109 range=(-99999.9 99999.9) clamped=false
      Coordinate sternoclavicular_r3: default_value=0.05366888 range=(-99999.9 99999.9) clamped=false
      PhysicalOffsetFrame Thorax_offset: socket_parent=/bodyset/Thorax translation=(0.006325 0.00693 0.025465)
      PhysicalOffsetFrame RClavicle_offset: socket_parent=/bodyset/RClavicle translation=(0 0 0)
      SpatialTransform: axes_held_at_zero=(rotation3 translation1 translation2 translation3)
        TransformAxis rotation1: coordinates=sternoclavicular_r2 axis=(0.0153 0.9892987 -0.1451)
            LinearFunction(coefficients=1 0)
        TransformAxis rotation2: coordinates=sternoclavicular_r3 axis=(-0.9944725 0 -0.104997)
            LinearFunction(coefficients=1 0)
    CustomJoint unrotscap: socket_parent_frame=RClavicle_offset socket_child_frame=RClavicle_Phantom_offset
      Coordinate unrotscap_r3: default_value=-0.05366888 range=(-99999.9 99999.9) clamped=false
      Coordinate unrotscap_r2: default_value=0.1267109 range=(-99999.9 99999.9) clamped=false
      PhysicalOffsetFrame RClavicle_offset: socket_parent=/bodyset/RClavicle translation=(-0.01433 0.02007 0.135535)
      PhysicalOffsetFrame RClavicle_Phantom_offset: socket_parent=/bodyset/RClavicle_Phantom translation=(0 0 0)
      SpatialTransform: axes_held_at_zero=(rotation3 translation1 translation2 translation3)
        TransformAxis rotation1: coordinates=unrotscap_r3 axis=(-0.9944725 0 -0.104997)
            LinearFunction(coefficients=1 0)
        TransformAxis rotation2: coordinates=unrotscap_r2 axis=(0.0153 0.9892987 -0.1451)
            LinearFunction(coefficients=1 0)
    CustomJoint acromioclavicular: socket_parent_frame=RClavicle_Phantom_offset socket_child_frame=RScapula_offset
      Coordinate acromioclavicular_r2: default_value=-0.02565634 range=(-99999.9 99999.9) clamped=false
      Coordinate acromioclavicular_r3: default_value=0.2073451 range=(-99999.9 99999.9) clamped=false
      Coordinate acromioclavicular_r1: default_value=0.09320058 range=(-99999.9 99999.9) clamped=false
      PhysicalOffsetFrame RClavicle_Phantom_offset: socket_parent=/bodyset/RClavicle_Phantom translation=(0 0 0)
      PhysicalOffsetFrame RScapula_offset: socket_parent=/bodyset/RScapula translation=(0 0 0)
      SpatialTransform: axes_held_at_zero=(translation1 translation2 translation3)
        TransformAxis rotation1: coordinates=acromioclavicular_r2 axis=(0.1570949 0.9472686 -0.2792909)
            LinearFunction(coefficients=1 0)
        TransformAxis rotation2: coordinates=acromioclavicular_r3 axis=(-0.754084 0.297594 0.585487)
            LinearFunction(coefficients=1 0)
        TransformAxis rotation3: coordinates=acromioclavicular_r1 axis=(0.6376998 0.1186 0.7610998)
            LinearFunction(coefficients=1 0)
    CustomJoint unrothum: socket_parent_frame=RScapula_offset socket_child_frame=RScapula_Phantom_offset
      Coordinate unrothum_r1: default_value=-0.09320058 range=(-99999.9 99999.9) clamped=false
      Coordinate unrothum_r3: default_value=-0.2073451 range=(-99999.9 99999.9) clamped=false
      Coordinate unrothum_r2: default_value=0.02565634 range=(-99999.9 99999.9) clamped=false
      PhysicalOffsetFrame RScapula_offset: socket_parent=/bodyset/RScapula translation=(-0.00955 -0.034 0.009)
      PhysicalOffsetFrame RScapula_Phantom_offset: socket_parent=/bodyset/RScapula_Phantom translation=(0 0 0)
      SpatialTransform: axes_held_at_zero=(translation1 translation2 translation3)
        TransformAxis rotation1: coordinates=unrothum_r1 axis=(0.6376998 0.1186 0.7610998)
            LinearFunction(coefficients=1 0)
        TransformAxis rotation2: coordinates=unrothum_r3 axis=(-0.754084 0.297594 0.585487)
            LinearFunction(coefficients=1 0)
        TransformAxis rotation3: coordinates=unrothum_r2 axis=(0.1570949 0.9472686 -0.2792909)
            LinearFunction(coefficients=1 0)
    CustomJoint shoulder0: socket_parent_frame=RScapula_Phantom_offset socket_child_frame=RA1H_Phantom_offset
      Coordinate elv_angle: default_value=0 range=(-1.570796 2.268928) clamped=false locked=true
      PhysicalOffsetFrame RScapula_Phantom_offset: socket_parent=/bodyset/RScapula_Phantom translation=(0 0 0)
      PhysicalOffsetFrame RA1H_Phantom_offset: socket_parent=/bodyset/RA1H_Phantom translation=(0 0 0)
      SpatialTransform: axes_held_at_zero=(rotation2 rotation3 translation1 translation2 translation3)
        TransformAxis rotation1: coordinates=elv_angle axis=(0.0048 0.9990892 0.04240001)
            LinearFunction(coefficients=1 0)
    CustomJoint shoulder1: socket_parent_frame=RA1H_Phantom_offset socket_child_frame=RA1H_Phantom2_offset
      Coordinate shoulder_elv: default_value=-8.626935e-12 range=(0 3.141593) clamped=false locked=true
      Coordinate shoulder1_r2: default_value=0 range=(-99999.9 99999.9) clamped=false
      PhysicalOffsetFrame RA1H_Phantom_offset: socket_parent=/bodyset/RA1H_Phantom translation=(0 0 0)
      PhysicalOffsetFrame RA1H_Phantom2_offset: socket_parent=/bodyset/RA1H_Phantom2 translation=(0 0 0)
      SpatialTransform: axes_held_at_zero=(rotation3 translation1 translation2 translation3)
        TransformAxis rotation1: coordinates=shoulder_elv axis=(-0.9982614 0.0023 0.05889802)
            LinearFunction(coefficients=1 0)
        TransformAxis rotation2: coordinates=shoulder1_r2 axis=(0.0048 0.9990892 0.04240001)
            LinearFunction(coefficients=1 0)
    CustomJoint shoulder2: socket_parent_frame=RA1H_Phantom2_offset socket_child_frame=Phys_offset
      Coordinate shoulder_rot: default_value=0 range=(-1.570796 0.3490659) clamped=false locked=true
      PhysicalOffsetFrame RA1H_Phantom2_offset: socket_parent=/bodyset/RA1H_Phantom2 translation=(0 0 0)
      PhysicalOffsetFrame Phys_offset: socket_parent=/bodyset/Phys_Phantom translation=(0 0 0)
      SpatialTransform: axes_held_at_zero=(rotation2 rotation3 translation1 translation2 translation3)
        TransformAxis rotation1: coordinates=shoulder_rot axis=(0.0048 0.9990892 0.04240001)
            LinearFunction(coefficients=1 0)
    CustomJoint phys_joint: socket_parent_frame=Phys_offset socket_child_frame=RA1H_offset
      Coordinate phys_coord_ab_ad: default_value=0 range=(-3.1416 3.1416) clamped=true locked=true
      Coordinate phys_coord_rot: default_value=0 range=(-3.1416 3.1416) clamped=true locked=true
      Coordinate phys_coord_fl_ex: default_value=0 range=(-3.1416 3.1416) clamped=true locked=true
      PhysicalOffsetFrame Phys_offset: socket_parent=/bodyset/Phys_Phantom translation=(0 0 0)
      PhysicalOffsetFrame RA1H_offset: socket_parent=/bodyset/RA1H translation=(0 0 0)
      SpatialTransform: axes_held_at_zero=(translation1 translation2 translation3)
        TransformAxis rotation1: coordinates=phys_coord_ab_ad axis=(1 0 0) LinearFunction(coefficients=1 0)
        TransformAxis rotation2: coordinates=phys_coord_rot axis=(0 1 0) LinearFunction(coefficients=1 0)
        TransformAxis rotation3: coordinates=phys_coord_fl_ex axis=(0 0 1) LinearFunction(coefficients=1 0)
    CustomJoint RA1H_RA2U: socket_parent_frame=RA1H_offset socket_child_frame=RA2U_offset
      Coordinate elbow_flexion: default_value=-2e-8 range=(0 2.2689) clamped=false locked=true
      Coordinate ra_el_e_f: default_value=1.570796 range=(0 2.2689) clamped=false
      PhysicalOffsetFrame RA1H_offset: socket_parent=/bodyset/RA1H translation=(0.0061 -0.2904 -0.0123)
      PhysicalOffsetFrame RA2U_offset: socket_parent=/bodyset/RA2U translation=(0 0 0)
      SpatialTransform: axes_held_at_zero=(rotation2 translation1 translation2 translation3)
        TransformAxis rotation1: coordinates=elbow_flexion axis=(0.04940001 0.03660001 0.9981083)
            LinearFunction(coefficients=1 0)
        TransformAxis rotation3: coordinates=ra_el_e_f axis=(0 0 1) LinearFunction(coefficients=1 0)
    CustomJoint RA2U_RA2R: socket_parent_frame=RA2U_offset socket_child_frame=RA2R_offset
      Coordinate ra_wr_s_p: default_value=-0.1614779 range=(-1.5708 1.5708) clamped=false
      PhysicalOffsetFrame RA2U_offset: socket_parent=/bodyset/RA2U translation=(0.0004 -0.011503 0.019999)
      PhysicalOffsetFrame RA2R_offset: socket_parent=/bodyset/RA2R translation=(0 0 0)
      SpatialTransform: axes_held_at_zero=(rotation2 rotation3 translation1 translation2 translation3)
        TransformAxis rotation1: coordinates=ra_wr_s_p axis=(-0.01716099 0.9926656 -0.119668)
            LinearFunction(coefficients=1 0)
    CustomJoint RA2R_RA3M: socket_parent_frame=RA2R_offset socket_child_frame=RA3M_offset
      Coordinate ra_wr_e_f: default_value=0 range=(-1.2217 1.2217) clamped=false
      Coordinate ra_wr_ad_ab: default_value=1.226522e-24 range=(-0.1745 0.5236) clamped=false
      PhysicalOffsetFrame RA2R_offset: socket_parent=/bodyset/RA2R translation=(0.018 -0.247 0.0279)
      PhysicalOffsetFrame RA3M_offset: socket_parent=/bodyset/RA3M translation=(-0.0035 -0.0005 0)
      SpatialTransform: axes_held_at_zero=(rotation2 translation1 translation2 translation3)
        TransformAxis rotation1: coordinates=ra_wr_e_f axis=(1 0 0) LinearFunction(coefficients=1 0)
        TransformAxis rotation3: coordinates=ra_wr_ad_ab axis=(0 0 1) LinearFunction(coefficients=1 0)
    CustomJoint RA3M_RA4P1: socket_parent_frame=RA3M_offset socket_child_frame=RA4P1_offset
      Coordinate ra_cmc1_ad_ab: default_value=0.3490659 range=(0 0.8727) clamped=true
      Coordinate ra_cmc1_f_e: default_value=0.4 range=(0 0.8727) clamped=true
      PhysicalOffsetFrame RA3M_offset: socket_parent=/bodyset/RA3M translation=(0.024 -0.0201 -0.0107)
      PhysicalOffsetFrame RA4P1_offset: socket_parent=/bodyset/RA4P1 translation=(0 0.0172 0)
      SpatialTransform: axes_held_at_zero=(rotation2 translation1 translation2 translation3)
        TransformAxis rotation1: coordinates=ra_cmc1_ad_ab axis=(1 0 0) LinearFunction(coefficients=1 0)
        TransformAxis rotation3: coordinates=ra_cmc1_f_e axis=(0 0 1) LinearFunction(coefficients=1 0)
    CustomJoint RA4P1_RA5C1: socket_parent_frame=RA4P1_offset socket_child_frame=RA5C1_offset
      Coordinate ra_mcp1_f_e: default_value=-0.2771932 range=(-0.7854 0) clamped=true
      PhysicalOffsetFrame RA4P1_offset: socket_parent=/bodyset/RA4P1 translation=(0 -0.029 0)
      PhysicalOffsetFrame RA5C1_offset: socket_parent=/bodyset/RA5C1 translation=(0 0.0075 0)
      SpatialTransform: axes_held_at_zero=(rotation1 rotation2 translation1 translation2 translation3)
        TransformAxis rotation3: coordinates=ra_mcp1_f_e axis=(0 0 1) LinearFunction(coefficients=1 0)
    CustomJoint RA5C1_RA6D1: socket_parent_frame=RA5C1_offset socket_child_frame=RA6D1_offset
      Coordinate ra_ip1_f_e: default_value=-0.0008878377 range=(-1.5708 0) clamped=true
      PhysicalOffsetFrame RA5C1_offset: socket_parent=/bodyset/RA5C1 translation=(0 -0.0195 0)
      PhysicalOffsetFrame RA6D1_offset: socket_parent=/bodyset/RA6D1 translation=(0 0 0)
      SpatialTransform: axes_held_at_zero=(rotation1 rotation2 translation1 translation2 translation3)
        TransformAxis rotation3: coordinates=ra_ip1_f_e axis=(0 0 1) LinearFunction(coefficients=1 0)
    CustomJoint RA3M_RA4P2: socket_parent_frame=RA3M_offset socket_child_frame=RA4P2_offset
      Coordinate ra_mcp2_e_f: default_value=0.0002947496 range=(0 1.5708) clamped=true
      Coordinate ra_mcp2_ab_ad: default_value=0 range=(-0.2618 0.2618) clamped=true locked=true
      PhysicalOffsetFrame RA3M_offset: socket_parent=/bodyset/RA3M translation=(0.021 -0.085 0)
      PhysicalOffsetFrame RA4P2_offset: socket_parent=/bodyset/RA4P2 translation=(0 0 0)
      SpatialTransform: axes_held_at_zero=(rotation2 translation1 translation2 translation3)
        TransformAxis rotation1: coordinates=ra_mcp2_e_f axis=(1 0 0) LinearFunction(coefficients=1 0)
        TransformAxis rotation3: coordinates=ra_mcp2_ab_ad axis=(0 0 1) LinearFunction(coefficients=1 0)
    CustomJoint RA4P2_RA5C2: socket_parent_frame=RA4P2_offset socket_child_frame=RA5C2_offset
      Coordinate ra_pip2_e_f: default_value=0.0001507848 range=(0 2.0944) clamped=true
      PhysicalOffsetFrame RA4P2_offset: socket_parent=/bodyset/RA4P2 translation=(0 -0.04 0)
      PhysicalOffsetFrame RA5C2_offset: socket_parent=/bodyset/RA5C2 translation=(0 0 0)
      SpatialTransform: axes_held_at_zero=(rotation2 rotation3 translation1 translation2 translation3)
        TransformAxis rotation1: coordinates=ra_pip2_e_f axis=(1 0 0) LinearFunction(coefficients=1 0)
    CustomJoint RA5C2_RA6D2: socket_parent_frame=RA5C2_offset socket_child_frame=RA6D2_offset
      Coordinate ra_dip2_e_f: default_value=0.0006520257 range=(0 1.5708) clamped=true
      PhysicalOffsetFrame RA5C2_offset: socket_parent=/bodyset/RA5C2 translation=(0 -0.022 0)
      PhysicalOffsetFrame RA6D2_offset: socket_parent=/bodyset/RA6D2 translation=(0 0 0)
      SpatialTransform: axes_held_at_zero=(rotation2 rotation3 translation1 translation2 translation3)
        TransformAxis rotation1: coordinates=ra_dip2_e_f axis=(1 0 0) LinearFunction(coefficients=1 0)
    CustomJoint RA3M_RA4P3: socket_parent_frame=RA3M_offset socket_child_frame=RA4P3_offset
      Coordinate ra_mcp3_e_f: default_value=0.0004560138 range=(0 1.5708) clamped=true
      Coordinate ra_mcp3_ab_ad: default_value=0 range=(-0.2618 0.2618) clamped=true locked=true
      PhysicalOffsetFrame RA3M_offset: socket_parent=/bodyset/RA3M translation=(0.004 -0.085 0)
      PhysicalOffsetFrame RA4P3_offset: socket_parent=/bodyset/RA4P3 translation=(0 0 0)
      SpatialTransform: axes_held_at_zero=(rotation2 translation1 translation2 translation3)
        TransformAxis rotation1: coordinates=ra_mcp3_e_f axis=(1 0 0) LinearFunction(coefficients=1 0)
        TransformAxis rotation3: coordinates=ra_mcp3_ab_ad axis=(0 0 1) LinearFunction(coefficients=1 0)
    CustomJoint RA4P3_RA5C3: socket_parent_frame=RA4P3_offset socket_child_frame=RA5C3_offset
      Coordinate ra_pip3_e_f: default_value=0.0003229524 range=(0 2.0944) clamped=true
      PhysicalOffsetFrame RA4P3_offset: socket_parent=/bodyset/RA4P3 translation=(0 -0.0405 0)
      PhysicalOffsetFrame RA5C3_offset: socket_parent=/bodyset/RA5C3 translation=(0 0 0)
      SpatialTransform: axes_held_at_zero=(rotation2 rotation3 translation1 translation2 translation3)
        TransformAxis rotation1: coordinates=ra_pip3_e_f axis=(1 0 0) LinearFunction(coefficients=1 0)
    CustomJoint RA5C3_RA6D3: socket_parent_frame=RA5C3_offset socket_child_frame=RA6D3_offset
      Coordinate ra_dip3_e_f: default_value=0.0001514308 range=(0 1.5708) clamped=true
      PhysicalOffsetFrame RA5C3_offset: socket_parent=/bodyset/RA5C3 translation=(0 -0.029047 0)
      PhysicalOffsetFrame RA6D3_offset: socket_parent=/bodyset/RA6D3 translation=(0 0 0)
      SpatialTransform: axes_held_at_zero=(rotation2 rotation3 translation1 translation2 translation3)
        TransformAxis rotation1: coordinates=ra_dip3_e_f axis=(1 0 0) LinearFunction(coefficients=1 0)
    CustomJoint RA3M_RA4P4: socket_parent_frame=RA3M_offset socket_child_frame=RA4P4_offset
      Coordinate ra_mcp4_e_f: default_value=0.0001514405 range=(0 1.5708) clamped=true
      Coordinate ra_mcp4_ab_ad: default_value=0 range=(-0.2618 0.2618) clamped=true locked=true
      PhysicalOffsetFrame RA3M_offset: socket_parent=/bodyset/RA3M translation=(-0.011 -0.081 0)
      PhysicalOffsetFrame RA4P4_offset: socket_parent=/bodyset/RA4P4 translation=(0 0 0)
      SpatialTransform: axes_held_at_zero=(rotation2 translation1 translation2 translation3)
        TransformAxis rotation1: coordinates=ra_mcp4_e_f axis=(1 0 0) LinearFunction(coefficients=1 0)
        TransformAxis rotation3: coordinates=ra_mcp4_ab_ad axis=(0 0 1) LinearFunction(coefficients=1 0)
    CustomJoint RA4P4_RA5C4: socket_parent_frame=RA4P4_offset socket_child_frame=RA5C4_offset
      Coordinate ra_pip4_e_f: default_value=0.0001507942 range=(0 2.0944) clamped=true
      PhysicalOffsetFrame RA4P4_offset: socket_parent=/bodyset/RA4P4 translation=(0 -0.039 0)
      PhysicalOffsetFrame RA5C4_offset: socket_parent=/bodyset/RA5C4 translation=(0 0 0)
      SpatialTransform: axes_held_at_zero=(rotation2 rotation3 translation1 translation2 translation3)
        TransformAxis rotation1: coordinates=ra_pip4_e_f axis=(1 0 0) LinearFunction(coefficients=1 0)
    CustomJoint RA5C4_RA6D4: socket_parent_frame=RA5C4_offset socket_child_frame=RA6D4_offset
      Coordinate ra_dip4_e_f: default_value=0.0001514405 range=(0 1.5708) clamped=true
      PhysicalOffsetFrame RA5C4_offset: socket_parent=/bodyset/RA5C4 translation=(0 -0.024 0)
      PhysicalOffsetFrame RA6D4_offset: socket_parent=/bodyset/RA6D4 translation=(0 0 0)
      SpatialTransform: axes_held_at_zero=(rotation2 rotation3 translation1 translation2 translation3)
        TransformAxis rotation1: coordinates=ra_dip4_e_f axis=(1 0 0) LinearFunction(coefficients=1 0)
    CustomJoint RA3M_RA4P5: socket_parent_frame=RA3M_offset socket_child_frame=RA4P5_offset
      Coordinate ra_mcp5_e_f: default_value=0.0001514405 range=(0 1.5708) clamped=true
      Coordinate ra_mcp5_ab_ad: default_value=0 range=(-0.2618 0.2618) clamped=true locked=true
      PhysicalOffsetFrame RA3M_offset: socket_parent=/bodyset/RA3M translation=(-0.022 -0.075 0)
      PhysicalOffsetFrame RA4P5_offset: socket_parent=/bodyset/RA4P5 translation=(0 0 0)
      SpatialTransform: axes_held_at_zero=(rotation2 translation1 translation2 translation3)
        TransformAxis rotation1: coordinates=ra_mcp5_e_f axis=(1 0 0) LinearFunction(coefficients=1 0)
        TransformAxis rotation3: coordinates=ra_mcp5_ab_ad axis=(0 0 1) LinearFunction(coefficients=1 0)
    CustomJoint RA4P5_RA5C5: socket_parent_frame=RA4P5_offset socket_child_frame=RA5C5_offset
      Coordinate ra_pip5_e_f: default_value=0.0001507942 range=(0 2.0944) clamped=true
      PhysicalOffsetFrame RA4P5_offset: socket_parent=/bodyset/RA4P5 translation=(0 -0.0325 0.001)
      PhysicalOffsetFrame RA5C5_offset: socket_parent=/bodyset/RA5C5 translation=(0 0 0)
      SpatialTransform: axes_held_at_zero=(rotation2 rotation3 translation1 translation2 translation3)
        TransformAxis rotation1: coordinates=ra_pip5_e_f axis=(1 0 0) LinearFunction(coefficients=1 0)
    CustomJoint RA5C5_RA6D5: socket_parent_frame=RA5C5_offset socket_child_frame=RA6D5_offset
      Coordinate ra_dip5_e_f: default_value=0.0001514405 range=(0 1.5708) clamped=true
      PhysicalOffsetFrame RA5C5_offset: socket_parent=/bodyset/RA5C5 translation=(0 -0.02 0)
      PhysicalOffsetFrame RA6D5_offset: socket_parent=/bodyset/RA6D5 translation=(0 0 0)
      SpatialTransform: axes_held_at_zero=(rotation2 rotation3 translation1 translation2 translation3)
        TransformAxis rotation1: coordinates=ra_dip5_e_f axis=(1 0 0) LinearFunction(coefficients=1 0)
  ConstraintSet:
    CoordinateCouplerConstraint [values shared by the 11 below unless stated]: independent_coordinate_names=shoulder_elv
        scale_factor=1
    CoordinateCouplerConstraint sternoclavicular_r2_con: dependent_coordinate_name=sternoclavicular_r2
      coupled_coordinates_function: SimmSpline: x=(0 2.61799) y=(0 -0.633555)
    CoordinateCouplerConstraint sternoclavicular_r3_con: dependent_coordinate_name=sternoclavicular_r3
      coupled_coordinates_function: SimmSpline: x=(0 3.14159) y=(0 0.322013)
    CoordinateCouplerConstraint unrotscap_r2_con: dependent_coordinate_name=unrotscap_r2
      coupled_coordinates_function: SimmSpline: x=(0 2.61799) y=(0 0.633555)
    CoordinateCouplerConstraint unrotscap_r3_con: dependent_coordinate_name=unrotscap_r3
      coupled_coordinates_function: SimmSpline: x=(0 3.14159) y=(0 -0.322013)
    CoordinateCouplerConstraint acromioclavicular_r1_con: dependent_coordinate_name=acromioclavicular_r1
      coupled_coordinates_function: SimmSpline: x=(0 2.61799) y=(0 0.466003)
    CoordinateCouplerConstraint acromioclavicular_r2_con: dependent_coordinate_name=acromioclavicular_r2
      coupled_coordinates_function: SimmSpline: x=(0 2.61799) y=(0 -0.128282)
    CoordinateCouplerConstraint acromioclavicular_r3_con: dependent_coordinate_name=acromioclavicular_r3
      coupled_coordinates_function: SimmSpline: x=(0 2.61799) y=(0 1.03673)
    CoordinateCouplerConstraint unrothum_r1_con: dependent_coordinate_name=unrothum_r1
      coupled_coordinates_function: SimmSpline: x=(0 2.61799) y=(0 -0.466003)
    CoordinateCouplerConstraint unrothum_r2_con: dependent_coordinate_name=unrothum_r2
      coupled_coordinates_function: SimmSpline: x=(0 2.61799) y=(0 0.128282)
    CoordinateCouplerConstraint unrothum_r3_con: dependent_coordinate_name=unrothum_r3
      coupled_coordinates_function: SimmSpline: x=(0 2.61799) y=(0 -1.03673)
    CoordinateCouplerConstraint shoulder1_r2_con: independent_coordinate_names=elv_angle
        dependent_coordinate_name=shoulder1_r2
      coupled_coordinates_function: SimmSpline: x=(-1.5708 3.14159) y=(1.5708 -3.14159)
